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/batch
! ANSYS input file written by Workbench version 2025 R1
! File used for geometry attach: C:\Users\nicol\Desktop\full_plate.step
/title,full_plate_force--Static Structural (A5)
/COM,/COM,     ANSYSMotion, 2025.1
/com,--- Data in consistent NMM units. See Solving Units in the help system for more information.
/units,MPA
/prep7
! Turn off shape checking because checks already performed inside WB mesher.
! See help system for more information.
SHPP,OFF,,NOWARN
etcon,set             ! allow ANSYS to choose best KEYOP's for 180x elements, resets any applicable keyopt to MAPDL defaults
/com,*********** Nodes for the whole assembly ***********
nblock,3,,8938
(1i9,3e20.9e3)
        1     6.000000000E+00    -6.800000000E+01     7.000000000E+00
        2     4.242640687E+00    -6.375735931E+01     7.000000000E+00
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-1
/com,*********** Elements for Body 1 'Full Plate' ***********
et,1,187
eblock,19,solid,,5010
(19i9)
        1        1        1        1        0        0        0        0       10        0        1      443     1217      534     1169     4099     4825     4091     4098
     8111     4824
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-1
/com,*********** Send User Defined Coordinate System(s) ***********
csys,0
toffst,273.15,      ! Temperature offset from absolute zero
/com,*********** Set Reference Temperature ***********
tref,22.
/com,*********** Send Materials ***********
MP,DENS,1,1.54e-09,	! tonne mm^-3
MP,EX,1,209000,	! tonne s^-2 mm^-1
MP,EY,1,9450,	! tonne s^-2 mm^-1
MP,EZ,1,9450,	! tonne s^-2 mm^-1
MP,PRXY,1,0.27,
MP,PRYZ,1,0.4,
MP,PRXZ,1,0.27,
MP,GXY,1,5500,	! tonne s^-2 mm^-1
MP,GYZ,1,3900,	! tonne s^-2 mm^-1
MP,GXZ,1,5500,	! tonne s^-2 mm^-1

TB,FCLI,1,1,9,2
TBDATA,1,0.0092,-0.0053,0.0031,-0.0172,0.0031,-0.0172
TBDATA,7,0.016,0.014
MP,ALPX,1,-4e-07,	! C^-1
MP,ALPY,1,3e-05,	! C^-1
MP,ALPZ,1,3e-05,	! C^-1

TB,FCLI,1,1,20,1
TBDATA,1,1979
TBDATA,2,-893
TBDATA,3,26
TBDATA,4,-139
TBDATA,5,26
TBDATA,6,-139
TBDATA,7,100
TBDATA,8,50
TBDATA,9,100
TBDATA,10,-1
TBDATA,11,-1
TBDATA,12,-1
TBDATA,13,0.35
TBDATA,14,0.3
TBDATA,15,0.25
TBDATA,16,0.25

!************************* Model Summary ********************
!Full Plate,	Epoxy Carbon UD (395 GPa) Prepreg,	matid,	1
!************************* End Model Summary ********************
/com,*********** Fixed Supports ***********
CMBLOCK,_FIXEDSU,NODE,      386
(8i10)
         9        27        28        29        30        31        32        33
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cmsel,s,_FIXEDSU
d,all,all
nsel,all
fini
/com,****************************************************************************
/com,*************************    SOLUTION       ********************************
/com,****************************************************************************
/solu
antype,0                   ! static analysis
_thickRatio=  1     ! Ratio of thick parts in the model
eqsl,pcg,1e-8,,,,,,1
cntr,print,1               ! print out contact info and also make no initial contact an error
cncheck,dmp		!	Enable program controlled contact splitting for distributed memory parallel run
dmpoption,emat,no             ! Don't combine emat file for DANSYS
dmpoption,esav,no             ! Don't combine esav file for DANSYS
nldiag,cont,iter           ! print out contact info each equilibrium iteration
rescontrol,,none                 ! Do not keep any restart files
/com,****************************************************
/com,******************* SOLVE FOR LS 1 OF 1 ****************
/com,*** Set Displacements ***
CMBLOCK,_CM49UX_XP,NODE,      167
(8i10)
        10        37        54        55        56        57        58        59
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cmsel,s,_CM49UX_XP
d,all,ux,1.
CMBLOCK,_CM49UY_YP,NODE,      167
(8i10)
        10        37        54        55        56        57        58        59
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cmsel,s,_CM49UY_YP
d,all,uy,1.
CMBLOCK,_CM49UZ_ZP,NODE,      167
(8i10)
        10        37        54        55        56        57        58        59
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cmsel,s,_CM49UZ_ZP
d,all,uz,1.
nsel,all

/com,*** Component For All Non-Zero UX Displacements ***
cmsel,s,_CM49ux_xp
cm,_DISPNONZEROUX,NODE
nsel,all


/com,*** Component For All Non-Zero UY Displacements ***
cmsel,s,_CM49uy_yp
cm,_DISPNONZEROUY,NODE
nsel,all


/com,*** Component For All Non-Zero UZ Displacements ***
cmsel,s,_CM49uz_zp
cm,_DISPNONZEROUZ,NODE
nsel,all

nsub,1,1,1
time,1.
outres,erase
outres,all,none
outres,nsol,all,
outres,rsol,all
outres,eangl,all
outres,etmp,all
outres,veng,all
outres,strs,all,
outres,epel,all,
outres,eppl,all,
outres,cont,all,
outres,nload,all
! *********** WB SOLVE COMMAND ***********
! check interactive state
*get,ANSINTER_,active,,int
*if,ANSINTER_,ne,0,then
/eof
*endif
solve
/com *************** Write FE CONNECTORS *********
CEWRITE,file,ce,,INTE
/com,****************************************************
/com,*************** FINISHED SOLVE FOR LS 1 *************
*get,_NSOLTHREADS,active,0,ntfs
*get,_NSOLPROCESSES,active,0,npfs
*get,_PCGITER,active,,solu,cgiter
/post1
fini
